############################################################
#      hydrogen
############################################################
log             log.meas
echo            both

units           real
dimension       3
boundary        p p p

neighbor        0.3 bin
neigh_modify    delay 0 one 10000

processors      16 16 2
read_restart    restart.*
############################################################ INTERACTION

group      hydrogen          type 1
group      wallB             type 2
group      wallT             type 3
group      wallrigid         type 4

group      wall union wallB wallT

variable     rCut equal 12
variable     Tw   equal 300
variable     Tg   equal 300

pair_style   lj/cut ${rCut}
pair_modify  shift yes mix arithmetic # Lorentz Berthelot rules 1 - 2

pair_coeff   1 1 0.01707 2.810 ${rCut}

pair_coeff   2 2 15.9743 2.4710 ${rCut} # wall-wall
pair_coeff   3 3 15.9743 2.4710 ${rCut} # wall-wall
pair_coeff   4 4 0.0000 3.170 0.1 # rwall-rwall off

# LB mixing
pair_coeff   1 2 0.0421 2.72 ${rCut} # wall-CH4 imp
pair_coeff   1 3 0.0421 2.72 ${rCut} # wall-CH4 imp
pair_coeff   1 4 0.0421 2.72 ${rCut} # wall-CH4 imp

pair_coeff   2 3 15.9743 2.4710 ${rCut} # wall-wall same as wall-wall
pair_coeff   2 4 15.9743 2.4710 ${rCut} # wall-rwall same as wall-wall
pair_coeff   3 4 15.9743 2.4710 ${rCut} # wall-rwall same as wall-wall
############################################################ RUN PARAMETERS

fix             w3 wallrigid setforce 0 0 0

fix             1 wallB nvt temp ${Tw} ${Tw} 100
fix             2 wallT nvt temp ${Tw} ${Tw} 100
fix             3 hydrogen nve

# Poiseuille flow
#variable        SIForce  equal 1.0e-15               # constant force for each atom in SI unit
#variable        refForce equal 69.4786e-12           # real unit convert to SI unit
#variable        forcePerAtom equal ${SIForce}/${refForce}
#fix             FIX_FORCE hydrogen addforce ${forcePerAtom} 0.0 0.0

##############################################################
# compute         dstress hydrogen stress/atom NULL
############################################################ RUN PARAMETERS

timestep        1.0
thermo_style    custom step temp pe etotal press
thermo          10000

dump            1 hydrogen custom 200 dump_meas_gas.lammpstrj id type x y z vx vy vz
dump_modify     1 sort id

run             800000 every 400000 "write_restart restart.*"
undump          1
