############################################################
#      methane
############################################################
log             log.equil
echo            both

units           real
dimension       3
boundary        p p p
atom_style      full

neighbor        0.3 bin
#neigh_modify    every 1 delay 1 check yes
neigh_modify    delay 0  one 10000

processors      16 16 2
read_data       data.dat
############################################################ INTERACTION

group      methane          type 1
group      wallB            type 2
group      wallT            type 3
group      wallrigid        type 4
group      adsorbent        type 5

group       wall union wallB wallT

variable     rCut equal 15
pair_style   lj/cut ${rCut}
pair_modify  shift yes mix arithmetic # Lorentz Berthelot rules 1 - 2

pair_coeff   1 1 0.2941 3.730 ${rCut}

pair_coeff   2 2 15.9743 2.4710 ${rCut} # wall-wall
pair_coeff   3 3 15.9743 2.4710 ${rCut} # wall-wall
pair_coeff   4 4 0.0000  3.170  0.1     # rwall-rwall off
pair_coeff   5 5 0.0000  3.730  0.1     # adsorbent (within the near-surface layer)

# LB mixing

pair_coeff   1 2 0.12787 3.545 ${rCut} # wall-CH4 imp
pair_coeff   1 3 0.12787 3.545 ${rCut} # wall-CH4 imp
pair_coeff   1 4 0.12787 3.545 ${rCut} # wall-CH4 imp
pair_coeff   1 5 0.2941  3.730 ${rCut} # adsorbent - CH4

pair_coeff   2 3 15.9743 2.4710 ${rCut} # wall- wall  same as wall-wall
pair_coeff   2 4 15.9743 2.4710 ${rCut} # wall- rwall same as wall-wall
pair_coeff   3 4 15.9743 2.4710 ${rCut} # wall- rwall same as wall-wall

pair_coeff   2 5 0.0000 3.545 0.1 # adsorbent - wall imp
pair_coeff   3 5 0.0000 3.545 0.1 # adsorbent - wall imp
pair_coeff   4 5 0.0000 3.545 0.1 # adsorbent - wall imp

########################################################### RUN PARAMETERS

variable        T equal 423

fix             w3 wallrigid setforce 0 0 0
velocity        methane   create $T 482748 dist gaussian mom yes
velocity        wallB     create $T 482748 dist gaussian mom yes
velocity        wallT     create $T 482748 dist gaussian mom yes

# Fix the temperture of both wall and gas.
# Tether the adsorbent using the spring force and solve thei motion by the langevin dynamics.
fix             1 wallB nvt temp $T $T 100
fix             2 wallT nvt temp $T $T 100
fix             3 methane nvt temp $T $T 100
fix             4 adsorbent nve
fix             5 adsorbent spring/self 100.0
fix             6 adsorbent langevin $T $T 50 1230917 zero yes


# Equilibrate the gas before applying a force.
timestep        2.0
thermo_style    custom step temp pe etotal press
thermo          5000

dump            1 methane custom 10000 dump_equil_gas.lammpstrj id type x y z vx vy vz
dump_modify     1 sort id

dump            2 adsorbent custom 10000 dump_equil_adsorbent.lammpstrj id type x y z vx vy vz
dump_modify     2 sort id

run             500000 every 50000 "write_restart restart.*"

undump          1
undump          2
